# [area: Task1]
tan(π/4 + 1) - cos(π/8) = -5.51192
sqrt(1 + ln(1 + sin(π/4))) + 1 = 2.23887
# [area: Task2]
f(x) := 2*sqrt(x^2 + 2*x - 2.75) - x - 3
f(6) = 4.45362
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x0 := 7
r0 := root(f(x0), x0)
r0 = 2.27008
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f(x) := sqrt(3*x + 1) + sqrt(9 - x) - 6/sqrt(9 - x)
f(6) = 2.62685
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x0 := 7
r0 := root(f(x0), x0)
r0 = 8
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f(x) := e^(-x^2) + e^(2*x) - 4
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f(2) = 50.6165
x0 := 1
r0 := root(f(x0), x0)
r0 = 0.596923
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f(x) := log(log(x, 10)) + log(log(x^3, 10) - 2, 10)
f(12) = 0.125655
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x0 := 7
r0 := root(f(x0), x0)
r0 = 10
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f(x) := nthroot((x + 1)/(x - 1), 3) + nthroot(2*x/(x^2 + 1), 3) - 1
f(10) = 0.652045
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x0 := 7
r0 := root(f(x0), x0)
r0 = 6.89075e21
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# [area: Task3]
f(x) := 0.2*x^5 - 4*x^3 + 12*x^2 - 9
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v := f(x) coeffs, x → [-9; 0; 12; -4; 0; .2]
r := polyroots(v)
r = [-5.53023; -0.774468; 1.061; 2.62185 - 1.74027i; 2.62185 + 1.74027i]
f(x) := -6*x^4 + 18*x^2 - 3*x + 6
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v := f(x) coeffs, x → [6; -3; 18; 0; -6]
r := polyroots(v)
r = [-1.88345; 0.0696491 - 0.547323i; 0.0696491 + 0.547323i; 1.74415]
# [area: Task 4]
Given(f(x), β(x))
