# Применение производных и односторонних пределов к исследованию функций. Разложение функции в ряд
# [area: Задание 1]
f(x) := -e^(x^2/3) - x/2  # Задаем функцию
f(0) = -1
g(x) := d/dx(f(x))  # Берем производную
g(3) = -40.6711
# Проверка на существование функции
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# График функции и её проивзодной
x0 := 0
root(g(x0), x0) = -0.651151
static := root(g(x0), x0)  # Нахождение стационарных точек
p(x) := d/dx(g(x))
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# Строим график второй производной
# По графику видно, что экстремум второй проивзодной = ∞
root(p(x0), x0) =  # error: При попытке расчета этого выражения найдено число с абсолютной величиной больше 10^307.
# так же нам подсказывает, что корней у второй производной нет
2*функция
f(x) := 1/2*x^5 - 2*x^4 + 3*x^3 - 7*x + 8  # Задаем функцию
f(0) = 8
g(x) := d/dx(f(x))  # Берем производную
g(3) = 60.5
# Проверка на существование функции
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# График функции и её проивзодной
x0 := 3
root(g(x0), x0) = 1.63959
static := root(g(x0), x0)  # Нахождение стационарных точек
x0 := -3
root(g(x0), x0) = -0.671931
static := root(g(x0), x0)
p(x) := d/dx(g(x))
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# Строим график второй производной
x0 := 0
root(p(x0), x0) = -2.15445e-14
Max := 0  # Имеется только точка максимума
2*функция
f(x) := x^3/3*e^(-x^2)  # Задаем функцию
f(0) = 0
g(x) := d/dx(f(x))  # Берем производную
g(3) = -0.00555344
# Проверка на существование функции
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# График функции и её проивзодной
x0 := 1
root(g(x0), x0) = 1.22474
static := root(g(x0), x0)
x0 := 3
root(g(x0), x0) = 6.9238  # Нахождение стационарных точек
static := root(g(x0), x0)
x0 := -2
root(g(x0), x0) = -6.75523
static := root(g(x0), x0)
x0 := -1
root(g(x0), x0) = -1.22474
static := root(g(x0), x0)
p(x) := d/dx(g(x))
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# Строим график второй производной
x0 := 0
root(p(x0), x0) = -4.81319e-19
r1 := root(p(x0), x0)
x0 := -1
root(p(x0), x0) = -0.707107
r2 := root(p(x0), x0)
x0 := 1
root(p(x0), x0) = 0.707107
r3 := root(p(x0), x0)
x0 := -2
root(p(x0), x0) = -1.73205
r4 := root(p(x0), x0)
x0 := 2
root(p(x0), x0) = 1.73205
r5 := root(p(x0), x0)
x0 := -3
root(p(x0), x0) = -7.01084
r6 := root(p(x0), x0)
x0 := 3
root(p(x0), x0) = 7.01084
r7 := root(p(x0), x0)
Min := [r2; r3; r7]
Min = [-0.707107; 0.707107; 7.01084]
Max := [r4; r1; r5]
Max = [-1.73205; 0; 1.73205]
4*функция
f(x) := nthroot(x^2/(1 + x^4), 3)  # Задаем функцию
f(0) = 0
g(x) := d/dx(f(x))  # Берем производную
g(3) = -0.103802
# Проверка на существование функции
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# График функции и её проивзодной
x0 := 1
root(g(x0), x0) = 1
static := root(g(x0), x0)
x0 := -1
root(g(x0), x0) = -1
static := root(g(x0), x0)  # Нахождение стационарных точек
x0 := 0
root(g(x0), x0) = 0
static := root(g(x0), x0)
p(x) := d/dx(g(x))
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# Строим график второй производной
x0 := 0
root(p(x0), x0) = -2.11074e-21
r1 := root(p(x0), x0)
x0 := -1
root(p(x0), x0) = -1.54075
r2 := root(p(x0), x0)
x0 := 1
root(p(x0), x0) = 1.54075
r3 := root(p(x0), x0)
x0 := -2
root(p(x0), x0) = 2032736
r4 := root(p(x0), x0)
x0 := 2
root(p(x0), x0) = -2032735
r5 := root(p(x0), x0)
Max := r3
Max = 1.54075
Min := r2
Min = -1.54075
# [area: 2 задание]
x/(x - 1) series, x == 2 → 4 - x + (x - 2)^2 - (x - 2)^3 + (x - 2)^4 - (x - 2)^5
arcsin(x) series, x == 0 → arcsin(0) + x*{
    x0 ← 0
    d/dx0(arcsin(x0))
} + x^2*{
    x0 ← 0
    d^2/dx0^2(arcsin(x0))
}/2 + x^3*{
    x0 ← 0
    d^3/dx0^3(arcsin(x0))
}/6 + x^4*{
    x0 ← 0
    d^4/dx0^4(arcsin(x0))
}/24 + x^5*{
    x0 ← 0
    d^5/dx0^5(arcsin(x0))
}/120
1/sqrt(x) series, x == 1 → 3/2 - x/2 + 3*(x - 1)^2/8 - 5*(x - 1)^3/16 + 35*(x - 1)^4/128 - 63*(x - 1)^5/256
