# Задание 1 | Задание 2
f(x) := x^3/3*e^(-x^2)
A := [1, 1, 0; 2, -2, 3; 4, 1, 3]
start := -3
end := 3
step := 0.5
B := [1, 0, 0; 0, 1, 0; 0, 0, 1]
n := start, start + step .. end
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C := [-1, 3, 2; 1, 0, 4; 5, 7, 1]
D := A + (B + C)^-1*C → [71/29, 25/29, -5/29; 49/29, -24/29, 86/29; 115/29, 43/58, 235/58]
M := [2, -2, 1; -1, -1, 7; 1, -4, 2]
C := [4; 16; -3]
lsolve(M, C) → [11/3; 43/13; 128/39]
x1 := 0
x2 := 0
x3 := 0
f(x) := sin(x^2)
Given
2*x1 - 2*x2 + x3 == 4
start := -5
end := 5
step := 0.2
-x1 - x2 + 7*x3 == 16
n := start, start + step .. end
x1 - 4*x2 + 2*x3 == -3
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Find(x1, x2, x3) → [11/3; 43/13; 128/39]
V := [0; 2; 1]
W := [3, 2, 1]
A := [5, 8; 3, 4; 0, 0; 6, 1; 5, 8]
B := [4, 2, 9, 1, 3; 2.6, 1.9, 0.4, 8, 3.7; 15, 6, 2.6, 5, 0]
V*W → [0, 0, 0; 6, 4, 2; 3, 2, 1]
V*transpose(W) → 5
W*V → 5
W*B → [32.2, 15.8, 30.4, 24, 16.4]
B*A → [47, 65; 85.2, 66.0; 123, 149]
# Задание 3
a := -4
b := 4
h := 1
n := (b - a)/h
i := 1 .. n
x[0] := a
x[i] := x[i - 1] + h
f(x) := 1/(1 + x^2)
L(xx) := sum(f(x[i])*product(if(j == i, 1, (xx - x[j])/(x[i] - x[j])), j = 0 .. n), i = 0 .. n)
x = [-4; -3; -2; -1; 0; 1; 2; 3; 4]
f(x) = [0.0588235; 0.1; 0.2; 0.5; 1; 0.5; 0.2; 0.1; 0.0588235]
s := cspline(x, f(x))
A(t) := interp(s, x, f(x), t)
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