# Задание 1
# 1.1
F(x) := integral(1/cos(4*x)^2, x) → tan(4*x)/4
g(x) := d/dx(F(x)) → tan(4*x)^2 + 1
F(x) := integral(sin(x/2)^2, x) → x/2 - sin(x)/2
g(x) := d/dx(F(x)) → 1/2 - cos(x)/2
F(x) := integral(1/nthroot(5^x, 3), x) → -3/(5^(x/3)*ln(5))
g(x) := d/dx(F(x)) → 1/5^(x/3)
F(x) := integral(1/(x^2 + 4), x) → atan(x/2)/2
g(x) := d/dx(F(x)) → 1/(4*(x^2/4 + 1))
1.2
integral(x^3, x = -1 .. 2) = 3.75
integral((2 + 5*nthroot(x, 3))/x^3, x = 1 .. 8) = 3.89063
integral(nthroot(x - 1, 3), x = 2 .. 9) = 11.25
integral(1/cos(x)^2, x = -π/4 .. 0) = 1
1.3
f(x) := x^2
b := 1
a := -1
integral(f(x), x = a .. b)/(b - a) = 0.333333
f(x) := sin(x)
b := π
a := 0
integral(f(x), x = a .. b)/(b - a) = 0.63662
f(x) := 1/(1 + x^2)
b := 5
a := -3
integral(f(x), x = a .. b)/(b - a) = 0.327806
1.4
f1(x) := sqrt(8 - x^2)
f2(x) := sqrt(2*x)
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x := 0
Given
x^2 + 2*x - 8 == 0
x0 := Find(x)
x0 = 2
a := 0
b := x0
s := integral(f1(x) - f2(x), x = a .. b)
integral(f1(x) - f2(x), x = a .. b) = 2.47492
S := 2*s
S = 4.94985
1.5
f(x) := x^2
g(x) := d/dx(f(x)) → 2*x
L := integral(sqrt(1 + g(x)^2), x = 0 .. 4)
f(x) := sin(x)
g(x) := d/dx(f(x)) → cos(x)
L := integral(sqrt(1 + g(x)^2), x = 0 .. 2*π)
f(x) := tan(x)
g(x) := d/dx(f(x)) → tan(x)^2 + 1
L := integral(sqrt(1 + g(x)^2), x = -1.5 .. 1.5)
# Задание №2
1.1
N := 30
R := 10
i := 0 .. N
j := 0 .. N
ϕ[i] := i*2*π/N
θ[j] := j*2*π/N
X[i, j] := R*sin(ϕ[i])*cos(θ[j])
Y[i, j] := R*sin(ϕ[i])*sin(θ[j])
Z[i, j] := R*cos(ϕ[i])
# [component: inputs (X, Y, Z)]
# [component: inputs (X, Y, Z)]
# [component: inputs (X, Y, Z)]
# [component: inputs (X, Y, Z)]
# [component: inputs (X, Y, Z)]
# [component: inputs (X, Y, Z)]
# [component: inputs (X, Y, Z)]
# [component: inputs (X, Y, Z)]
N := 30
R := 10
i := 0 .. N
j := 0 .. N
a := 4
b := 2
ϕ[i] := i*2*π/N
c := 10
θ[j] := j*2*π/N
X[i, j] := a*sin(ϕ[i])*cos(θ[j])
Y[i, j] := b*sin(ϕ[i])*sin(θ[j])
Z[i, j] := c*cos(ϕ[i])
# [component: inputs (X, Y, Z)]
# [component: inputs (X, Y, Z)]
# [component: inputs (X, Y, Z)]
# [component: inputs (X, Y, Z)]
# [component: inputs (X, Y, Z)]
# [component: inputs (X, Y, Z)]
# [component: inputs (X, Y, Z)]
1.3
f(x) := 2/x
a := 1
b := 8
V := π*integral(f(x)^2, x = a .. b)
V = 10.9956
